# Find minimum energy fcc configuration
# Mark Tschopp, 2010


# ---------- Initialize Simulation ---------------------
#clear
#units metal
units lj
dimension 3
boundary f f f
atom_style atomic
atom_modify map array


# ---------- Define Settings ---------------------
compute eng all pe/atom
compute eatoms all reduce sum c_eng


# ---------- Create Atoms ------------------------
print ">>>>>>>>>>>>>>>>>>>>>>>>>>>>>>>>>>>>>>>>>>>>> MINIMIZE ITER: 000 \n"
read_data   coords-lmp/0000.lmp
mass 1 1.00
group cluster type 1


# ---------- Define Interatomic Potential ---------------------
pair_style lj/cut 3.5
pair_coeff 1 1 1.0 1.0 3.5

neighbor 2.0 bin
neigh_modify delay 10 check yes


# ----------- OUTPUT
dump	  conf  all custom 1 config.xyz id type x y z fx fy fz

thermo_style custom step pe fnorm lx ly lz press pxx pyy pzz c_eatoms
#thermo_style    custom step temp press pe ke etotal c_q_Al c_q_Oxy lx ly lz vol
thermo 100

# ----------- Run Minimization ---------------------
min_style fire

# ----------- ARTn
plugin load /home/mammasmias-1/Nico/Project_pARTn/artn-plugin/libartn.so
plugin list
fix             10 all artn alpha0 0.2 alphashrink 0.99 tmax 10 dtshrink 0.5 dtgrow 1.1 delaystep 5 dmax 0.15


# ---------- Loop over all the files ---------------
variable iter loop 1 199 pad
label bench


#timestep 0.0003   # unit metal
timestep 0.015     # unit LJ


#min_modify: dma or delaystep or dtgrow or dtshrink or alpha0 or alphahrink or...
#            tmax or tmin or halfstepback or initialdelay or vdfmax or line or...
#            norm or discrete_factor or integrator or tmax
#            alpha_damp: does not work anymore

minimize 1e-3 1e-3 5000 10000


# ---------- Load new Atoms ------------------------
delete_atoms group cluster
print ">>>>>>>>>>>>>>>>>>>>>>>>>>>>>>>>>>>>>>>>>>>>> MINIMIZE ITER: ${iter} \n"
read_data   coords-lmp/0${iter}.lmp  add merge
group cluster type 1

# undump and dump to reset timestep
undump conf
reset_timestep 0
dump      conf  all custom 1 config.xyz id type x y z fx fy fz

## LOOP next
next iter
jump SELF bench


print "All done!"
